*Heading
** Job name: Job-1 Model name: Model-1
** Generated by: Abaqus/CAE 2021
*Preprint, echo=NO, model=NO, history=NO, contact=NO
**
** PARTS
**
*Part, name=Part-1
*Node
      1,           0.,           0.,           0.
      2,  0.498039216,           0.,           0.
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*Element, type=S4
   1,    1,    2,   54,   53
   2,    2,    3,   55,   54
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*Nset, nset=_PickedSet2, internal, generate
    1,  2912,     1
*Elset, elset=_PickedSet2, internal, generate
    1,  2805,     1
** Section: Section-1
*Shell Section, elset=_PickedSet2, composite
0.0345, 3, PW, 45.
0.0345, 3, PW, -45.
0.0345, 3, PW, 45.
0.0345, 3, PW, -45.
0.0345, 3, PW, 45.
0.0345, 3, PW, -45.
0.0345, 3, PW, 45.
0.0345, 3, PW, -45.
*Transverse Shear Stiffness
1688., 1688., 0.
*End Part
**
**
** ASSEMBLY
**
*Assembly, name=Assembly
**
*Instance, name=Part-1-1, part=Part-1
*End Instance
**
*Node
      1,   12.6999998,  -25.2999992,  -1.83000004
*Node
      2,   12.6999998,   52.7319984,  -1.83000004
*Nset, nset=Set-1
 1,
*Nset, nset=Set-2
 2,
*Nset, nset=_PickedSet9, internal
 1,
*Elset, elset=_s_Surf-1_E1, internal, instance=Part-1-1, generate
  1,  51,   1
*Surface, type=ELEMENT, name=s_Surf-1
_s_Surf-1_E1, E1
*Elset, elset=_s_Surf-2_E3, internal, instance=Part-1-1, generate
 2755,  2805,     1
*Surface, type=ELEMENT, name=s_Surf-2
_s_Surf-2_E3, E3
** Constraint: Constraint-1
*Coupling, constraint name=Constraint-1, ref node=_PickedSet9, surface=s_Surf-1
*Kinematic
** Constraint: Constraint-2
*Coupling, constraint name=Constraint-2, ref node=Set-2, surface=s_Surf-2
*Kinematic
*End Assembly
**
** MATERIALS
**
*Material, name=PW
*Depvar
     41,
*User Material, constants=57
 0.9563,     9.697,     93.78,     981.1,     9283.,    97210.,   963100., 9.472e+06
 5.631e+07,   60577.9,   410.595,   281.005,    588.16,   176.385,    660.28,     291.2
   259.325,   683.185,   272.925,   15823.5,    11.595,     7.025,     11.52,     2.865
       8.7,      0.22,     3.885,    -4.095,    -3.075,   60577.9,   410.595,   281.005
    588.16,   176.385,    660.28,     291.2,   259.325,   683.185,   272.925,   2916.38
   113.405,    76.945,    157.78,    46.845,    173.16,      72.8,    68.855,   164.115
    75.025,        0.,        0.,      643.,       15.,       70.,      104.,     0.205
        1.,
**
** BOUNDARY CONDITIONS
**
** Name: BC-1 Type: Displacement/Rotation
*Boundary
Set-1, 1, 1
Set-1, 2, 2
Set-1, 3, 3
Set-1, 5, 5
Set-1, 6, 6
** Name: BC-2 Type: Displacement/Rotation
*Boundary
Set-2, 1, 1
Set-2, 3, 3
Set-2, 5, 5
Set-2, 6, 6
** ----------------------------------------------------------------
**
** STEP: Step-1
**
*Step, name=Step-1, nlgeom=YES, inc=1000000
*Static
0.1, 120., 0.0012, 0.2
**
** BOUNDARY CONDITIONS
**
** Name: BC-2 Type: Displacement/Rotation
*Boundary
Set-2, 2, 2, -25.4
**
** OUTPUT REQUESTS
**
*Restart, write, frequency=0
**
** FIELD OUTPUT: F-Output-1
**
*Output, field
*Node Output
U,
*Element Output, directions=YES
E, MISES, S, SDV, SE, SF
**
** HISTORY OUTPUT: H-Output-1
**
*Output, history
*Node Output, nset=Set-2
RF1, RF2, RF3, RM1, RM2, RM3, U1, U2
U3, UR1, UR2, UR3
*End Step
** ----------------------------------------------------------------
**
** STEP: Step-2
**
*Step, name=Step-2, nlgeom=YES, inc=10000000
*Static
1., 21600., 0.216, 100.
**
** OUTPUT REQUESTS
**
*Restart, write, frequency=0
**
** FIELD OUTPUT: F-Output-1
**
*Output, field
*Node Output
U,
*Element Output, directions=YES
E, MISES, S, SDV, SE, SF
**
** HISTORY OUTPUT: H-Output-1
**
*Output, history
*Node Output, nset=Set-2
RF1, RF2, RF3, RM1, RM2, RM3, U1, U2
U3, UR1, UR2, UR3
*End Step
** ----------------------------------------------------------------
**
** STEP: Step-3
**
*Step, name=Step-3, nlgeom=YES, inc=1000000
*Static
0.1, 120., 0.0012, 0.2
**
** BOUNDARY CONDITIONS
**
** Name: BC-1 Type: Displacement/Rotation
*Boundary, op=NEW
Set-1, 1, 1
Set-1, 2, 2
Set-1, 3, 3
Set-1, 5, 5
Set-1, 6, 6
** Name: BC-2 Type: Displacement/Rotation
*Boundary, op=NEW
Set-2, 1, 1
Set-2, 3, 3
Set-2, 5, 5
Set-2, 6, 6
**
** OUTPUT REQUESTS
**
*Restart, write, frequency=0
**
** FIELD OUTPUT: F-Output-1
**
*Output, field
*Node Output
U,
*Element Output, directions=YES
E, MISES, S, SDV, SE, SF
**
** HISTORY OUTPUT: H-Output-1
**
*Output, history
*Node Output, nset=Set-2
RF1, RF2, RF3, RM1, RM2, RM3, U1, U2
U3, UR1, UR2, UR3
*End Step
** ----------------------------------------------------------------
**
** STEP: Step-4
**
*Step, name=Step-4, nlgeom=YES, inc=10000000
*Static
1., 10000., 0.1, 100.
**
** OUTPUT REQUESTS
**
*Restart, write, frequency=0
**
** FIELD OUTPUT: F-Output-1
**
*Output, field
*Node Output
U,
*Element Output, directions=YES
E, MISES, S, SDV, SE, SF
**
** HISTORY OUTPUT: H-Output-1
**
*Output, history
*Node Output, nset=Set-2
RF1, RF2, RF3, RM1, RM2, RM3, U1, U2
U3, UR1, UR2, UR3
*End Step
